<neuroml xmlns="http://www.neuroml.org/schema/neuroml2"  xmlns:xs="http://www.w3.org/2001/XMLSchema" xmlns:xsi="http://www.w3.org/2001/XMLSchema-instance" xsi:schemaLocation="http://www.neuroml.org/schema/neuroml2 https://raw.github.com/NeuroML/NeuroML2/development/Schemas/NeuroML2/NeuroML_v2.0.xsd" id="Joglekar1Network_PyNN">
    <notes>Generated by NeuroMLlite v0.2.1
    Generated network: Joglekar1Network_PyNN
    Generation seed: 1234</notes>
    <include href="Joglekar1Network_PyNN__lems.xml"/>
    <IF_curr_alpha id="excitatory" cm="0.4" i_offset="0.284" tau_syn_E="0.1" tau_syn_I="0.1" v_init="-70." tau_m="20." tau_refrac="2." v_reset="-60." v_rest="-70." v_thresh="-50."/>
    <IF_curr_alpha id="inhibitory" cm="0.2" i_offset="0.294" tau_syn_E="0.1" tau_syn_I="0.1" v_init="-70." tau_m="10." tau_refrac="2." v_reset="-60." v_rest="-70." v_thresh="-50."/>
    <network id="Joglekar1Network_PyNN">
        <notes>Joglekar network: a network with PyNN cells &amp; inputs</notes>
        <property tag="recommended_dt_ms" value="0.01"/>
        <property tag="recommended_duration_ms" value="1000.0"/>
        <population id="popE" component="excitatory" size="1600" type="populationList">
            <property tag="region" value="region1"/>
            <instance id="0">
                <location x="966.453535692138757" y="44.073259917535268" z="7.491470058587191"/>
            </instance>
            <instance id="1">
                <location x="910.975962449124154" y="93.926899736376399" z="582.227573058949133"/>
            </instance>
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        </population>
        <population id="popI" component="inhibitory" size="400" type="populationList">
            <property tag="region" value="region1"/>
            <instance id="0">
                <location x="840.01379013348128" y="72.774662521903593" z="357.991939812736121"/>
            </instance>
            <instance id="1">
                <location x="687.777688409120401" y="90.533014846402097" z="190.689101494863394"/>
            </instance>
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        </population>
        <inputList id="stimE" population="popE" component="noisyCurrentSourceE">
            <input id="0" target="../popE/0/excitatory" destination="synapses"/>
            <input id="1" target="../popE/1/excitatory" destination="synapses"/>
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        </inputList>
        <inputList id="stimI" population="popI" component="noisyCurrentSourceI">
            <input id="0" target="../popI/0/inhibitory" destination="synapses"/>
            <input id="1" target="../popI/1/inhibitory" destination="synapses"/>
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        </inputList>
    </network>
</neuroml>
