<?xml version="1.0" ?>
<Lems xmlns="http://www.neuroml.org/lems/0.7.3" xmlns:xsi="http://www.w3.org/2001/XMLSchema-instance" xsi:schemaLocation="http://www.neuroml.org/lems/0.7.3 https://raw.githubusercontent.com/LEMS/LEMS/development/Schemas/LEMS/LEMS_v0.7.3.xsd">
  <ComponentType description="NeuroML implementation of PyNN's NoisyCurrentSource: a Gaussian 'white' noise current source. The current amplitude changes at fixed     intervals, with the new value drawn from a Gaussian distribution." extends="baseVoltageDepPointCurrentSpiking" name="noisyCurrentSource">
    <Parameter dimension="time" name="delay"/>
    <Parameter dimension="time" name="duration"/>
    <Parameter dimension="current" name="mean"/>
    <Parameter dimension="current" name="stdev"/>
    <Parameter dimension="time" name="noiseDt"/>
    <EventPort description="Note this is not used here. Will be removed in future" direction="in" name="in"/>
    <Dynamics>
      <StateVariable dimension="current" exposure="i" name="i"/>
      <StateVariable dimension="time" name="tsince"/>
      <StateVariable dimension="none" name="U"/>
      <StateVariable dimension="none" name="V"/>
      <StateVariable dimension="none" name="randn"/>
      <TimeDerivative value="1" variable="tsince"/>
      <OnCondition test="t .lt. delay-noiseDt">
        <StateAssignment value="0" variable="i"/>
        <StateAssignment value="0" variable="tsince"/>
      </OnCondition>
      <OnCondition test="tsince .geq. noiseDt">
        <StateAssignment value="random(1)" variable="U"/>
        <StateAssignment value="random(1)" variable="V"/>
        <StateAssignment value="sqrt(-2*log(U))*cos(2*3.14159265359*V)" variable="randn"/>
        <StateAssignment value="mean+stdev*randn" variable="i"/>
        <StateAssignment value="0" variable="tsince"/>
      </OnCondition>
      <OnCondition test="t .geq. duration + delay">
        <StateAssignment value="0" variable="i"/>
      </OnCondition>
    </Dynamics>
  </ComponentType>
  <Component delay="0ms" duration="24hour" id="noisyCurrentSourceE" mean="0.0nA" noiseDt="1.0ms" stdev="0.848528137423857nA" type="noisyCurrentSource"/>
  <Component delay="0ms" duration="24hour" id="noisyCurrentSourceI" mean="0.0nA" noiseDt="1.0ms" stdev="0.6000000000000001nA" type="noisyCurrentSource"/>
</Lems>
