<Lems>

    <Include file="NoisyCurrentSource.xml"/>

    <noisyCurrentSource id="noisyCurrentSourceE" delay="0ms" duration="24hour" mean="0.25 nA" stdev="0.1 nA" noiseDt="1.0ms"/>
    <noisyCurrentSource id="noisyCurrentSourceI" delay="0ms" duration="24hour" mean="0.25 nA" stdev="0.1 nA" noiseDt="1.0ms"/>

</Lems>
