<Lems>

    <!--

        This LEMS file has been automatically generated using PyNeuroML v0.7.6 (libNeuroML v0.4.2)

     -->

    <!-- Specify which component to run -->
    <Target component="SimJoglekar_figure1c" reportFile="report.SimJoglekar_figure1c.txt"/>

    <!-- Include core NeuroML2 ComponentType definitions -->
    <Include file="Cells.xml"/>
    <Include file="Networks.xml"/>
    <Include file="Simulation.xml"/>

    <Include file="PyNN.xml"/>
    <Include file="Joglekar_figure1b.net.nml"/>
    <Include file="Joglekar_figure1b__lems.xml"/>

    <Simulation id="SimJoglekar_figure1c" length="2.0ms" step="0.02ms" target="Joglekar_figure1b" seed="5678">  <!-- Note seed: ensures same random numbers used every run -->

        <Display id="Excitatory_4.05_4.8_0_r" title="Plots of Excitatory_4.05_4.8_0_r" timeScale="1ms" xmin="-0.2" xmax="2.2" ymin="-1" ymax="1">
            <Line id="Excitatory_4_05_4_8_0_Exc_r" quantity="Excitatory_4.05_4.8/0/Exc/r" scale="1" color="#d54f33" timeScale="1ms"/>
        </Display>

        <Display id="Inhibitory_4.05_4.8_0_r" title="Plots of Inhibitory_4.05_4.8_0_r" timeScale="1ms" xmin="-0.2" xmax="2.2" ymin="-1" ymax="1">
            <Line id="Inhibitory_4_05_4_8_0_Inh_r" quantity="Inhibitory_4.05_4.8/0/Inh/r" scale="1" color="#0534e4" timeScale="1ms"/>
        </Display>

        <OutputFile id="Excitatory_4_05_4_8_0_r_dat" fileName="Excitatory_4.05_4.8_0.r.dat">
            <OutputColumn id="Excitatory_4_05_4_8_0_Exc_r" quantity="Excitatory_4.05_4.8/0/Exc/r"/>
        </OutputFile>

        <OutputFile id="Inhibitory_4_05_4_8_0_r_dat" fileName="Inhibitory_4.05_4.8_0.r.dat">
            <OutputColumn id="Inhibitory_4_05_4_8_0_Inh_r" quantity="Inhibitory_4.05_4.8/0/Inh/r"/>
        </OutputFile>

    </Simulation>

</Lems>
